# [component: outputs D[1]]
# [component: outputs D[2]]
# [component: outputs D[3]]
# [component: outputs D[5]]
# [component: outputs D[4]]
# [component: outputs D[6]]
# [component: outputs D[7]]
# [component: outputs D[8]]
# [component: outputs D[9]]
# [component: outputs D[0]]
[70, 235]
9
[75, 545]
[70, 205]
dataset := 8
Data := D[dataset]
[640, n0]
[x1, x2] := [390, 850]
[x1, x2] := [100, 850]  # для первого датасета
[60, 235]
n0 := rows(Data)
[330, 580]
[x1, x2] := [45, 590]  # для второго датасета
Sett1 := [[0, n0]; [100, 850]; [45, 590]; [45, 570]; [80, 580]]
Sett1 := stack(Sett1, [[0, n0]; [650, n0 - 10]; [50, 450]; [100, 600]; [75, 505]])
n0 = 1016
[650, n0 - 10]
[x1, x2] := [45, 570]  # для четвертого датасета
[x1, x2] := [0, n0]
[x1, x2] := Sett1[dataset]
[x1, x2] = [100, 600]
# 6: 6+8.5+4.5 (crop1 6 crop2 8.5 crop 3 4.5)  5-7? 3*5? 3*8?  speed 2.8/2.8/2.8
# 7: 17 (crop 17)  3  (16-17)  speed 2.3
# 8: 31 (crop 15.5)  speed 3.0-3.1
T := Data[:, 6]
# время в мс
t_span := 0.001
counts := transpose([0, 0, 0, 0, 0, 0, 8.5, 17, 15.8, 0])
t_span*(T[n0 - 1] - T[0]) = 97.539
2.808333
τ := t_span*(T[x2] - T[x1])
τ = 48.105
τ/counts[dataset] = 3.04462
2.269471
3.207
[t1, t2] := [0, 20]  # время
n := x2 - x1
n = 500
fs := (t2 - t1)/n  # частота дискретизации sampling frequency
i := 0 .. n - 1
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i1 := 0 .. n - 2
T[i1 + 1] - T[i1] = [
    94; 94; 94; 94; 93; 93; 93; 93; 94; 94
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]
[Hcols, Acols] :=
    [transpose([0, 2]), transpose([3, 5])] if dataset < 6
    [transpose([3, 5]), transpose([0, 2])] otherwise
Hxyz0 := submatrix(Data, x1, x2 - 1, Hcols[0], Hcols[1])
Axyz0 := submatrix(Data, x1, x2 - 1, Acols[0], Acols[1])
Mnorm1(M) :=
    for i ∈ 0 .. rows(M) - 1
        q ← sqrt(M[i, 0]^2 + M[i, 1]^2 + M[i, 2]^2)
        for j ∈ 0 .. 2
            G[i, j] ←
                M[i, j]/q if q ≠ 0
                0 otherwise
    G
Mnorm3(M) :=
    μ ← transpose([mean(M[:, 0]), mean(M[:, 1]), mean(M[:, 2])])
    for i ∈ 0 .. rows(M) - 1
        q ← sqrt(sum((M[i, j] - μ[j])^2, j = 0 .. 2))
        for j ∈ 0 .. 2
            G[i, j] ← (M[i, j] - μ[j])/q
    G
Mnorm2(M) :=
    μ ← transpose([mean(M[:, 0]), mean(M[:, 1]), mean(M[:, 2])])
    for i ∈ 0 .. rows(M) - 1
        q ← sqrt(sum((M[i, j] - μ[j])^2, j = 0 .. 2))
        for j ∈ 0 .. 2
            G[i, j] ← M[i, j]/q
    G
Mnorm4(M) :=
    μ ← transpose([mean(M[:, 0]), mean(M[:, 1]), mean(M[:, 2])])
    σ ← transpose([Stdev(M[:, 0]), Stdev(M[:, 1]), Stdev(M[:, 2])])
    for i ∈ 0 .. rows(M) - 1
        for j ∈ 0 .. 2
            G[i, j] ← (M[i, j] - μ[j])/σ[j]
    G
Mnorm6(M) :=
    for i ∈ 0 .. rows(M) - 1
        q2 ← sum(M[i, j]^2, j = 0 .. 2)
        for j ∈ 0 .. 2
            G[i, j] ← M[i, j]^2/q2
    G
Mnorm5(M) := Mnorm1(Mnorm4(M))
Mnorm7(M) :=
    for i ∈ 0 .. rows(M) - 1
        q2 ← sum(M[i, j]^2, j = 0 .. 2)
        for j ∈ 0 .. 2
            G[i, j] ← |M[i, j]|/sqrt(q2)
    G
T = [
    81; 175; 269; 363; 457; 550; 643; 736; 829; 923
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]
normalize := 0
[Hxyz, Axyz] :=
    [Hxyz0, Axyz0] if normalize == 0
    [Mnorm1(Hxyz0), Mnorm1(Axyz0)] if normalize == 1
    [Mnorm2(Hxyz0), Mnorm2(Axyz0)] if normalize == 2
    [Mnorm3(Hxyz0), Mnorm3(Axyz0)] if normalize == 3
    [Mnorm4(Hxyz0), Mnorm4(Axyz0)] if normalize == 4
    [Mnorm5(Hxyz0), Mnorm5(Axyz0)] if normalize == 5
    [Mnorm6(Hxyz0), Mnorm6(Axyz0)] if normalize == 6
    [Hxyz0, Mnorm6(Axyz0)] if normalize == 66
    [Mnorm7(Hxyz0), Mnorm7(Axyz0)] if normalize == 7
    [Hxyz0, Mnorm1(Axyz0)] if normalize == 11
Hx := Hxyz[:, 0]
Ax := Axyz[:, 0]
Hy := Hxyz[:, 1]
Ay := Axyz[:, 1]  # датасет может начинаться с области, где человек стоит
Hz := Hxyz[:, 2]
Az := Axyz[:, 2]
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Acc := 10^-10
MaxIter := 200
NumPC := 3
Acc := 10^-6
MaxIter := 2000
PCA_result1 := Nipals(Hxyz, NumPC, MaxIter, "noscale", Acc)
PCA_result1[1] = [0.312521, 0.212937, 0.925737; 0.0272647, -0.97616, 0.215331; -0.94952, 0.0420555, 0.310876]
PCA_result1[2] = [0.366427; 0.7166; 1]
PCA_result1[3] = [1.92657e11; 1.84111e11; 1.49004e11]
PCA_result2 := Nipals(Axyz, NumPC, MaxIter, "noscale", Acc)
PCA_result2[1] = [-0.186293, -0.982469, 0.00698766; 0.777872, -0.143146, 0.611902; -0.600175, 0.119429, 0.790903]
PCA_result2[2] = [0.652549; 0.891259; 1]
PCA_result1 = [
    [
        27268, 32300.4, 11086;
        -2205.46, 25601.4, -8236.45;
        26966.6, -34392.2, -15717;
        -9462.46, 28136.1, -16948.2;
        -8060.54, -790.132, -4812.61;
        -32907.3, -26235.5, 7724.86;
        -818.935, 27090.9, -15471.2;
        -24781.9, 13260.3, 17067.1;
        -8725.6, -163.709, -10029.6;
        -24790.7, 15022.8, -915.875
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    ];
    [0.312521, 0.212937, 0.925737; 0.0272647, -0.97616, 0.215331; -0.94952, 0.0420555, 0.310876];
    [0.366427; 0.7166; 1];
    [1.92657e11; 1.84111e11; 1.49004e11];
    [
        25662.5, -28399.8, -21086.7;
        -2862.55, -26824.8, 610.288;
        -13445.5, 30923.2, -31937.7;
        -12655.5, -31372.8, 4899.29;
        -7142.55, -484.778, 6124.29;
        -8719.55, 26376.2, 32544.3;
        -8809.55, -29798.8, -2892.71;
        10878.5, -9944.78, 29394.3;
        -12046.5, -2237.78, 5160.29;
        -5396.55, -15537.8, 23886.3
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    ];
    [3; 500; 3; 2000; 1e-6; 0]
]
MA*X == MB
# A norm 1 data 8 crop
B := PCA_result1[0]
[0.62987; 0.976487; 1]
PCA_result1[1]*X == PCA_result2[1]
C := PCA_result2[0]
X := PCA_result2[1]*PCA_result1[1]^-1
[0.652549; 0.891259; 1]  # A norm 0 data 8 crop
X = [-0.260956, 0.955473, 0.137743; 0.77908, 0.292703, -0.554399; 0.570031, 0.0373611, 0.820773]
normalize2 := 0
HxyzPCA0 := submatrix(B, 0, n - 1, 0, 2)
AxyzPCA0 := submatrix(C, 0, n - 1, 0, 2)
[HxyzPCA, AxyzPCA] :=
    [HxyzPCA0, AxyzPCA0] if normalize2 == 0
    [Mnorm1(HxyzPCA0), Mnorm1(AxyzPCA0)] otherwise
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zero(x, y) := 0
L := 1024
n = 500
V2n(V) :=
    stack(V, matrix(L - n, 1, zero)) if n < L
    submatrix(V, 0, L - 1, 0, 0) otherwise  # для первого и остальных датасетов
t := 0
HxPCA := HxyzPCA[:, 0]
HyPCA := HxyzPCA[:, 1]
AxPCA := AxyzPCA[:, 0]
AyPCA := AxyzPCA[:, 1]
fftHxPCA := fft(V2n(HxPCA))
fftHyPCA := fft(V2n(HyPCA))
fftAxPCA := fft(V2n(AxPCA))
fftAyPCA := fft(V2n(AyPCA))
n1 := rows(fftHxPCA)
n1 = 513
p := 0 .. n1 - 1
[χ, ρ] :=
    [12, 12, 100] if normalize == 0
    [20*10^-5, 20*10^-5, 1] if normalize == 6
    [12, 20*10^-5, 2*10^4] if normalize == 66
[χ, ρ] :=
    [12, 100] if normalize == 0 and normalize2 == 0
    [20*10^-5, 1] otherwise
xyzV(V) := sqrt(V[:, 0]^2 + V[:, 1]^2 + V[:, 2]^2)
xyV(V) := sqrt(V[:, 0]^2 + V[:, 1]^2)
yzV(V) := sqrt(V[:, 1]^2 + V[:, 2]^2)
H_PCA == HxyzPCA
A_PCA == AxyzPCA
Hxy := xyV(Hxyz)
H_PCA == H  # случайно (?)
A_PCA ≠ A
Axy := xyV(Axyz)
H := xyzV(Hxyz)
H_PCA := xyzV(HxyzPCA)
Hxy_PCA := xyV(HxyzPCA)
Hyz_PCA := yzV(HxyzPCA)
A := xyzV(Axyz)
A_PCA := xyzV(AxyzPCA)
Axy_PCA := xyV(AxyzPCA)
Ayz_PCA := yzV(AxyzPCA)
Hn_PCA := Mnorm6(HxyzPCA)
Hnx := Hn_PCA[:, 0]
Hny := Hn_PCA[:, 1]
H0 := H_PCA
An_PCA := Mnorm6(AxyzPCA)
Anx := An_PCA[:, 0]
Any := An_PCA[:, 1]
A0 := A_PCA
H0 := Hny
H0 := HxPCA
H0 := Hnx
H0 := H
A0 := Any
A0 := AxPCA
A0 := Anx
A0 := A
ρ := 7*mean(H0)/mean(A0)
ρ := mean(Hnx)/mean(Anx)
ρ := 2*mean(H)/mean(A)
χ := 3*max(H0, ρ*A0)
χ := 3*max(Hnx, ρ*Anx)
χ := 1*max(H, ρ*A)
[mean(H), Stdev(H), mean(A), Stdev(A)]
[mean(M), Stdev(M)]
[Stat(H), Stat(A); Stat(H_PCA), Stat(A_PCA); Stat(HxPCA), Stat(AxPCA); Stat(Hxy), Stat(Axy)]
Stat := [
    mean(H), Stdev(H), mean(A), Stdev(A);
    mean(H_PCA), Stdev(H_PCA), mean(A_PCA), Stdev(A_PCA);
    mean(HxPCA), Stdev(HxPCA), mean(AxPCA), Stdev(AxPCA);
    mean(HyPCA), Stdev(HyPCA), mean(AyPCA), Stdev(AyPCA)
]
Stat = [
    31175, 9053.47, 1048.35, 193.065;
    31143.3, 9044.66, 297.362, 151.389;
    0, 19649.1, 0, 269.763;
    0, 19208.3, 0, 163.159
]
# 6 crop | 6 full
[
    31777.740713, 9241.300429, 1077.248528, 230.508134;
    31266.146139, 9173.989168, 425.586585, 275.831991;
    -5.529728*10^-13, 19580.179553, 2.012257*10^-14, 401.111953;
    8.003553*10^-13, 19084.048937, -2.341949*10^-14, 274.511907
]
[
    29774.312556, 9805.519592, 1050.944113, 171.207215;
    29570.861369, 10007.682324, 292.656087, 224.077749;
    -6.530885*10^-13, 18517.943949, -2.009462*10^-14, 282.477784;
    5.772014*10^-13, 18070.238911, 2.119951*10^-15, 203.119946
]
# 7 crop | 7 full
[
    30856.609883, 8796.400356, 1077.866594, 258.873606;
    30821.006703, 8834.477759, 414.788072, 247.116586;
    -6.91216*10^-13, 19414.988149, -4.973799*10^-14, 407.171407;
    3.228706*10^-13, 18219.752482, 2.060574*10^-14, 215.529071
]
[
    28671.196791, 9891.501048, 1058.831355, 211.246029;
    28512.22762, 10136.768557, 318.083583, 244.320284;
    2.40576*10^-13, 18187.89527, 0, 332.470783;
    2.479107*10^-13, 17282.789984, -4.332019*10^-15, 188.881027
]
# 8 crop | 8 full
[
    31175.034375, 9053.47207, 1048.353518, 193.064739;
    31143.257268, 9044.659999, 297.362142, 151.38885;
    -5.966285*10^-13, 19649.083542, -7.581491*10^-15, 269.763351;
    -1.67347*10^-13, 19208.34027, -2.955858*10^-15, 163.159268
]
[
    31184.945757, 9184.874295, 1085.601527, 321.004092;
    31174.158035, 9195.416307, 417.880349, 341.436592;
    5.406839*10^-13, 19457.593176, -2.970852*10^-14, 401.194995;
    -3.992467*10^-13, 18897.744244, 2.219747*10^-14, 313.626462
]
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fftHxy := fft(V2n(Hxy))
fftAxy := fft(V2n(Axy))
fftH := fft(V2n(H))
fftH_PCA := fft(V2n(H_PCA))
fftHxy_PCA := fft(V2n(Hxy_PCA))
fftHyz_PCA := fft(V2n(Hyz_PCA))
fftA := fft(V2n(A))
fftA_PCA := fft(V2n(A_PCA))
fftAxy_PCA := fft(V2n(Axy_PCA))
fftAyz_PCA := fft(V2n(Ayz_PCA))
fftHnx := fft(V2n(Hnx))
fftHx := fft(V2n(Hx))
fftHy := fft(V2n(Hy))
fftHz := fft(V2n(Hz))
fftAnx := fft(V2n(Anx))
fftAx := fft(V2n(Ax))
fftAy := fft(V2n(Ay))
fftAz := fft(V2n(Az))
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# fft PCA_A лучше fft A
# fft PCA_H практически совпадает с fft H (м.б. точно совпадает)
#
# PCA_Hx (первый компонент PCA_H) дает очень четкий первый пик на fft, лучше, чем PCA_H
# всегда видны четкие первых 2 пика, второй с частотой 2x
#
# на вторых компонентах PCA_H PCA_A тоже видны два пика, 0.5x x с немного смещенной частотой, менее выражены
#
# на третьих компонентах PCA_H PCA_A слабо x, 6x (!)
#
# если из первого датасета вырезать шлак по краям, результаты гораздо лучше
#
# пик 2х это и есть один шаг. пик х - это полный цикл, 2 шага.
# пик 0.5х это сверхцикл, интересна его природа
#
# что характерно,
# если независимо делать PCA для данных гироскопа и акселерометра, потом fft, можно видеть, что несущие частоты совпадают, причем для гироскопа более характерна частота х, т.е. 2 шага, а для акселерометра - 2x, т.е. 1 шаг.
# ширина пиков одинаковая практически
#
# проверено несколько датасетов
# таким образом, фурье-спектр первой главной компоненты от гироскопа и то же для акселорометра помогают установить точный период. для PCA_Hx самый сильный период х - 2 шага, слабее выражен 2х, т.е. 1 шаг, остальные почти не заметны
# для PCA_Ax сильный пик 2x, слабее х, остальные довольно слабы
#
# интересно, как связаны между собой матрицы, какой угол?
#
# при этом для H первая компонента 75% наблюдаемой дисперсии, для A - 50-60
#
# PCA от объединения H и A. нормировать на стандартное откл
#
# -----
# лучше работает 6 тип нормализации, причем только для акселерометра, для гироскопа он ухудшает
[0.670707; 0.93947; 1]
[0.436716; 0.798358; 1]
[0.741111; 0.95994; 1]
[0.507548; 0.893276; 1]
[0.755382; 0.928741; 1]
[0.474598; 0.751909; 1]
[0.737038; 0.958388; 1]
[0.511455; 0.892042; 1]
c(ρ, φ) := (cos(φ) + 1i*sin(φ))*ρ
GP(M, x) := sum(M[i, 0]*dnorm(x, M[i, 1], M[i, 2]), i = 0 .. rows(M) - 1)  # gauss peaks
ν1 := 6.85
n = 500
ν2 := 9.6
λ := 0.4*χ
ε := 0.4
σ11 := 1.2
σ12 := 1
σ13 := 1.4
Ν := transpose([0, ν1, ν2, 10.1, 10, 0, 6.9, 6.6, 8.1, 0])
Ν := transpose([0, ν1, ν2, 10.1, 10, 0, 8.8, 10.7, 8.1, 0])
ν := Ν[dataset]
ν = 8.1
[β, ξ] := [1, 1]
Τ := 2*n1/(ξ*β*ν)
# ν главная (минимальная) частота,
# β целочисленный коэффициент,
# ξ- поправка
# tau длина периода
Τ = 126.667
# 4 n1/2
# 2 n1
# β*ν n1
Ω := n/Τ
# количество периодов (шагов)
Ω = 3.94737
M1 := [1.5, ε*ν, σ11; 9, ν, σ12; 2, 2*ν, σ13]
M2 := stack(M1, [1.5, 3*ν, σ13])
8
M1 := [1, ε*ν, σ11; 1.2, ν, 1.5; 8, 2*ν, σ13]
M2 := stack(M1, [3, 3*ν, σ13])
7
M1 := [1, ε*ν, σ11; 8, ν, 1.5; 1, 2*ν, σ13]
M2 := stack(M1, [1, 3*ν, σ13])
M2 := [6, 1*ν, σ13]
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FH1 := fftHz
FH1 := fftHx
FH1 := fftHy
H1 := Hz
H1 := Hx
H1 := Hy
FH1 := fftHnx
FH1 := fftH
FH1 := fftHyPCA
FH1 := fftH_PCA
FH1 := fftHxPCA
H1 := Hnx
H1 := H
H1 := HyPCA
H1 := H_PCA
H1 := HxPCA
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n = 500
amps[p] := λ*GP(M2, p)
n1 = 513
phases := arg(FH1)
G[p] := c(amps[p], phases[p])
Hx_filt := ifft(G)
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M3 := [1, ε*ν, σ11; 5, ν, σ12; 16, 2*ν, σ13; 7, 3*ν, σ13]
M4 := stack(M3, [5, 4*ν1, 1.4])
M5 := stack(M4, [3, 6*ν, σ13; 3, 8*ν, σ13])
M3 := [4, ε*ν, σ11; 2, ν, σ12; 3, 1.75*ν, 1.5*σ13; 3, 3*ν, 1.5*σ13]
M4 := stack(M3, [3, 4*ν1, 1.5*σ13])
M5 := stack(M4, [2, 5.5*ν, 1.2*σ13; 2, 6.5*ν, 1.5*σ13])
M3 := [0, ε*ν, σ11; 0, ν, σ12; 0, 2*ν, 1.5*σ13; 0, 2.5*ν, 1.5*σ13]
M4 := stack(M3, [2, 4.5*ν1, 1.5*σ13])
M3 := [1.5, ε*ν, σ11; 5, ν, σ12; 3, 2*ν, σ13; 2, 3*ν, σ13]
M4 := stack(M3, [1, 4*ν, 1.4])
M5 := stack(M4, [3, 5*ν, σ13; 3, 7*ν, σ13])
M6 := stack(M5, [0.5, 26*ν, 1.4])
7
M3 := [1.5, ε*ν, σ11; 5, ν, σ12; 3, 2*ν, σ13; 2, 3*ν, σ13]
M4 := stack(M3, [1, 4*ν, 1.4])
M5 := stack(M4, [3, 5*ν, σ13; 3, 7*ν, σ13])
M6 := stack(M5, [0.5, 26*ν, 1.4])
M6 := [9, 1*ν, 1.4]
8
M3 := [3, ε*ν, σ13; 5, ν, 1.8; 2.5, 2*ν, 1.8; 3, 3*ν, 1.8]
M4 := stack(M3, [2, 4*ν, 1.8])
M5 := stack(M4, [2, 5*ν, 1.8; 3, 6*ν, 1.8])
M6 := stack(M5, [0, 18*ν, σ13])
σ122 := 12
# 16v: большой размытый пик, состоящий из нескольких = это полушаг
# 8v: пик с два раза меньшей частотой - это шаг одной ногой
# 4v: полный цикл - это два шага по очереди
#
# в h1 датасете похоже лошадь ходила и стояла. в 1 раз прошла 6 шагов
# h2 датасет кроп 1:1 (похоже вырезаны моменты. когда лошадь стояла)
# 8v 34
# 4v умещается 16-17 раз. т.е. число шагов 17
#
# в h3 датасете кроп ровно в два раза, поэтому на нем (n) умещается 30 шагов одной ногой 8v
#
# для лошади работает только акселерометр, гироскоп практически бесполезен
# после вырезания нужного участка с качественными данными анализ становится возможным.
# лучше всего оказалось AxPCA без нормализации - или с норм тип 11
#
# количество циклов считается из длины периода, которая определяется из частоты
# в дальнейшем можно автоматизировать процесс отделения области, где лошадь стоит от хода, если смотреть дисперсию полного ускорения со скользящим окном. области хода больше нуля, стоит =0
#
# h4 - стоит, потом делает 17 шагов, потом останавливается
# h5 -  похоже, сначала стоит, потом делает 5 шагов, потом еще 1 шаг еле-еле, потом останавливается, и в конце еще делает 1 шаг
#
# правильно  - большой пик это шаг 1 ногой, а не полушаг
# почему-то для h1-3 максимальный пик с 16v - попал не на шаг 1 ногой, а на полушаг...
ν2 := 9.8
ν2 := 10.1
# 8 2
M3 := [0, ν, σ12; 3, 4*ν, σ12; 15, 8*ν, σ12; 50, 16*ν, σ12]
M6 := stack(M3, [15, 24*ν, σ12])
ν = 8.1
M6_ := [105, ξ*β*ν, 10]
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M6_ := [50, ξ*β*ν, 12]
[β, ξ] := [16, 1]
Τ := 2*n1/(ξ*β*ν)
M6 := [15, 8*ν, 10; 50, 16*ν, 10; 0, 24*ν, 10]
Τ = 7.91667
Ω := n/Τ
Ω = 63.1579
[β, ξ] := [1, 1]
FA1 := fftAx
FA1 := fftAy
FA1 := fftA
FA1 := fftAz
A1 := Ax
A1 := Ay
A1 := A
A1 := Az
FA1 := fftAnx
FA1 := fftA_PCA
FA1 := fftAyPCA
FA1 := fftAxPCA
A1 := Anx
A1 := A_PCA
A1 := AyPCA
A1 := AxPCA
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amps[p] := λ*GP(M6, p)
n/n0 = 0.492126
phases := arg(FA1)
n = 500
G[p] := c(amps[p], phases[p])
n1 = 513
Ax_filt := ifft(G)
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12*(195 - 78)/n = 2.808
(n - 230)/(4*Τ) = 8.52632
12*(205 - 70)/n = 3.24
12*(230 - 70)/n = 3.84
21*(n - 10 - 77)/n = 17.346
21.3*(510 - 77)/n = 18.4458
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# презентация
M := AxyzPCA
s := 3000
M := Axyz
s := 1
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r[0] == [a[x], a[y], a[z]]
r[1] == [a[x]/a, a[y]/a, a[z]/a]
M := AxyzPCA[:, 0]
|a| == sqrt(a[x]^2 + a[y]^2 + a[z]^2)
M := A0
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p2 := n1/2
i2 := n
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